# OpenSim document version 40000
MarkerSet:
  Marker XIPH: torso (0.09882821 0.2290567 0)
  Marker JN: torso (0.04263823 0.3791175 0.00478016)
  Marker T10: torso (-0.08658653 0.1745329 0.002778427)
  Marker C7: torso (-0.08022374 0.4127105 0)
  Marker RASIS: pelvis (0.02 0.03 0.128)
  Marker LASIS: pelvis (0.02 0.03 -0.128)
  Marker RPSIS: pelvis (-0.1502287 0.04 0.05640649)
  Marker RLTHI: femur_r (0.018 -0.2 0.064)
  Marker RLEK: femur_r (0 -0.404 0.05)
  Marker RMEK: femur_r (0 -0.404 -0.05)
  Marker RLSHA: tibia_r (0.005 -0.25 0.05)
  Marker RLM: tibia_r (-0.005 -0.41 0.053)
  Marker RMM: tibia_r (0.006 -0.3888 -0.038)
  Marker RHEE: calcn_r (-0.02 0.02 0)
  Marker RMT5: calcn_r (0.1432552 0.01221359 0.04265134)
  Marker RMT2: calcn_r (0.19 0.005 0.002655426)
  Marker LLTHI: femur_l (0.018 -0.2 -0.064)
  Marker LLEK: femur_l (0 -0.404 -0.05)
  Marker LMEK: femur_l (0 -0.404 0.05)
  Marker LLSHA: tibia_l (0.005 -0.25 -0.05)
  Marker LLM: tibia_l (-0.005 -0.41 -0.053)
  Marker LMM: tibia_l (0.006 -0.3888 0.038)
  Marker LHEE: calcn_l (-0.02 0.02 0)
  Marker LMT5: calcn_l (0.1389304 0.01402553 -0.04679098)
  Marker LMT2: calcn_l (0.19 0.01157296 -0.005164574)
  Marker LPSIS: pelvis (-0.150229 0.04 -0.0564065)
